units           real
atom_style      molecular
special_bonds   lj 0.0 0.0 0.0


### define variables ###
# for run
variable        totalTime equal 5                                              # [ns]
variable        dt equal 5
variable        runstep equal ${totalTime}*1000000/${dt}
variable        dump equal ${runstep}/100
variable        fixstress equal ${runstep}/1000
variable        thermostep equal ${runstep}/1000
variable        restart equal ${runstep}/10

# temperature
variable        temp equal 360.0
variable        Tstart equal 360.0
variable        Tstop equal 360.0
variable        Tdampstep equal 100
variable        Tdamp equal ${dt}*${Tdampstep}

# pressure
variable        Pdampstep equal 10000
variable        Pdamp equal ${dt}*${Pdampstep}


### simulation settings ###
pair_style      lj96/cut 10
bond_style      harmonic
angle_style     hybrid harmonic gaussian
dihedral_style  nharmonic

read_data       Init.data
velocity        all create ${temp} 19990126 dist gaussian

include         ../PARAM.dat

#neighbor        0.4 bin
neigh_modify    every 1 delay 1 check yes

#change_box all triclinic
#comm_modify     cutoff 3.4

#compute mytemp all temp
#compute mypress all pressure mytemp


thermo_style custom step temp pe ke etotal epair ebond eangle edihed emol press vol density
thermo ${thermostep}

min_style       cg
minimize        1e-10 1e-10 10000 10000

fix 1 all nvt temp ${temp} ${temp} ${Tdamp}
fix 2 all langevin ${temp} ${temp} 400 19990126
fix 3 all deform 1 x final -95 95 y final -95 95 z final -95 95

dump 1 all custom ${dump} dump.1.lammpstrj id xu yu zu

timestep        ${dt}
restart ${restart} restart/res
run ${runstep} upto

write_data      24monomerM512.data
